<?xml version="1.0"?>
<!--
  File:     D12A.xml
  Author:   Aero-Matic v 0.83 / C.H
  Source for engine information : https://en.wikipedia.org/wiki/List_of_Volvo_Trucks_engines.
  Inputs:
    name:           D12A
    type:           piston
    power:          420.0 hp
    augmented?      no
    injected?       no
-->

<!-- Unsure about the displacement, if it is supposed to be 740 or 0.740 -->

<piston_engine name="D12A">
  <minmp unit="INHG">         10.0 </minmp>
  <maxmp unit="INHG">         28.5 </maxmp>
  <displacement unit="IN3"> 740.0 </displacement>
  <maxhp>        420.00 </maxhp>
  <cycles>         4.0 </cycles>
  <idlerpm>      700.0 </idlerpm>
  <maxrpm>      2800.0 </maxrpm>
  <sparkfaildrop>  0.1 </sparkfaildrop>
  <volumetric-efficiency> 0.85 </volumetric-efficiency>
  <man-press-lag> 0.1 </man-press-lag>
  <static-friction  unit="HP"> 1.60 </static-friction>
  <starter-torque> 256.00 </starter-torque>
  <starter-rpm> 1400 </starter-rpm>
 <!-- Defining <bsfc> over-rides the built-in horsepower calculations -->
 <!--<bsfc>           0.45 </bsfc>-->
  <stroke unit="IN">  5.9 </stroke>
  <bore unit="IN">    5.16 </bore>
  <cylinders>         6.0  </cylinders>
  <compression-ratio>  17.3 </compression-ratio>
</piston_engine>
